Analysis =
{
  AnyOperation &ref = .KinematicStudyForParameterIdentification.Kinematics;
};

AnyKinStudy KinematicStudyForParameterIdentification =
{
  Gravity = {0,0,0};/// Not relevant for AnyKinStudy
  AnyFolder& BodyModel = Main.HumanModel.BodyModelWithoutMuscles ;
  AnyFolder &EnvironmentModel = Main.EnvironmentModel;

  AnyFolder ModelEnvironmentConnection =
  {
    AnyFolder &MarkerDrivers = Main.ModelSetup.MocapDrivers;
    AnyFolder &ExtraDrivers = Main.ModelSetup.MocapExtraDrivers;
  };


  #include "KinematicStudyForParameterIdentificationSettings.any"

};


Main.RunParameterIdentification.ParameterIdentification =
{
  AnyOperation& ParameterOptimization = Main.Studies.ParameterIdentification.ParameterOptimization;
};
